<?xml version="1.0"?>
<!-- Original MIT idealized thrust source for numerical testing; no real engine specification. -->
<turbine_engine name="Synthetic original-synthetic thrust"><milthrust unit="N">2500</milthrust><maxthrust unit="N">2500</maxthrust><bypassratio>0</bypassratio><tsfc>.4</tsfc><atsfc>.4</atsfc><idlen1>30</idlen1><idlen2>60</idlen2><maxn1>100</maxn1><maxn2>100</maxn2><augmented>0</augmented><injected>0</injected><function name="IdleThrust"><value>.04</value></function><function name="MilThrust"><value>1</value></function></turbine_engine>
