<?xml version="1.0"?>
<!-- Original MIT numerical fixture. No real-aircraft calibration or procedure claims. -->
<fdm_config name="Original piston and fixed-pitch coupled prototype" version="2.0" release="ALPHA">
<fileheader><author>Flight Simulator Project</author><filecreationdate>2026-10-03</filecreationdate><description>Project-original airframe/gear with new original piston and fixed-pitch engineering parameters. Not a manufacturer aircraft or training model; stall and performance envelopes remain unvalidated.</description></fileheader>
<metrics><wingarea unit="M2">17</wingarea><wingspan unit="M">10</wingspan><chord unit="M">1.7</chord><location name="AERORP" unit="M"><x>0</x><y>0</y><z>0</z></location><location name="EYEPOINT" unit="M"><x>0</x><y>0</y><z>0</z></location><location name="VRP" unit="M"><x>0</x><y>0</y><z>0</z></location></metrics>
<mass_balance><ixx unit="SLUG*FT2">800</ixx><iyy unit="SLUG*FT2">1200</iyy><izz unit="SLUG*FT2">1600</izz><ixy unit="SLUG*FT2">0</ixy><ixz unit="SLUG*FT2">0</ixz><iyz unit="SLUG*FT2">0</iyz><emptywt unit="KG">1000</emptywt><location name="CG" unit="M"><x>0</x><y>0</y><z>0</z></location></mass_balance>
<ground_reactions><contact type="BOGEY" name="nose"><location unit="M"><x>-2</x><y>0</y><z>-1</z></location><static_friction>.8</static_friction><dynamic_friction>.6</dynamic_friction><rolling_friction>.01</rolling_friction><spring_coeff unit="N/M">150000</spring_coeff><damping_coeff unit="N/M/SEC">10000</damping_coeff><damping_coeff_rebound unit="N/M/SEC">10000</damping_coeff_rebound><max_steer unit="DEG">30</max_steer><brake_group>NONE</brake_group><retractable>0</retractable></contact><contact type="BOGEY" name="left"><location unit="M"><x>1</x><y>-1.3</y><z>-1</z></location><static_friction>.8</static_friction><dynamic_friction>.6</dynamic_friction><rolling_friction>.01</rolling_friction><spring_coeff unit="N/M">150000</spring_coeff><damping_coeff unit="N/M/SEC">10000</damping_coeff><damping_coeff_rebound unit="N/M/SEC">10000</damping_coeff_rebound><max_steer unit="DEG">0</max_steer><brake_group>LEFT</brake_group><retractable>0</retractable></contact><contact type="BOGEY" name="right"><location unit="M"><x>1</x><y>1.3</y><z>-1</z></location><static_friction>.8</static_friction><dynamic_friction>.6</dynamic_friction><rolling_friction>.01</rolling_friction><spring_coeff unit="N/M">150000</spring_coeff><damping_coeff unit="N/M/SEC">10000</damping_coeff><damping_coeff_rebound unit="N/M/SEC">10000</damping_coeff_rebound><max_steer unit="DEG">0</max_steer><brake_group>RIGHT</brake_group><retractable>0</retractable></contact></ground_reactions>
<propulsion>
  <engine file="original-piston">
    <feed>0</feed>
    <thruster file="original-fixed-prop">
      <location unit="M"><x>-2</x><y>0</y><z>0</z></location>
      <orient unit="RAD"><roll>0</roll><pitch>0</pitch><yaw>0</yaw></orient>
      <sense>1</sense><p_factor>0</p_factor>
    </thruster>
  </engine>
  <tank type="FUEL" number="0" name="Original single point tank">
    <location unit="M"><x>0</x><y>0</y><z>0</z></location>
    <drain_location unit="M"><x>0</x><y>0</y><z>0</z></drain_location>
    <radius unit="IN">0</radius><inertia_factor>1</inertia_factor>
    <capacity unit="LBS">220.462262184877580722973801345027033854207027336019783577929</capacity>
    <contents unit="LBS">220.462262184877580722973801345027033854207027336019783577929</contents>
    <unusable-volume unit="GAL">0</unusable-volume>
    <standpipe unit="LBS">0</standpipe><priority>1</priority>
    <density unit="LBS/GAL">6</density><temperature>-9999</temperature>
  </tank>
</propulsion>
<flight_control name="Pass-through normalized synthetic controls"/>
<aerodynamics><alphalimits unit="RAD"><min>-.2</min><max>.2</max></alphalimits><axis name="LIFT"><function name="aero/original-interactive-lift"><product><product><property>aero/qbar-psf</property><property>metrics/Sw-sqft</property></product><sum><value>0.22</value><product><value>5</value><property>aero/alpha-rad</property></product></sum></product></function></axis>
<axis name="DRAG"><function name="aero/original-interactive-drag"><product><product><property>aero/qbar-psf</property><property>metrics/Sw-sqft</property></product><sum><value>0.03</value><product><value>0.08</value><pow><property>aero/alpha-rad</property><value>2</value></pow></product></sum></product></function></axis>
<axis name="SIDE"><function name="aero/original-interactive-side"><product><product><property>aero/qbar-psf</property><property>metrics/Sw-sqft</property></product><sum><product><value>-0.5</value><property>aero/beta-rad</property></product><product><value>0.15</value><property>fcs/rudder-cmd-norm</property></product></sum></product></function></axis>
<axis name="ROLL"><function name="aero/original-interactive-roll"><product><product><property>aero/qbar-psf</property><property>metrics/Sw-sqft</property></product><property>metrics/bw-ft</property><sum><product><value>-0.05</value><property>aero/beta-rad</property></product><product><value>-0.6</value><quotient><product><property>velocities/p-aero-rad_sec</property><property>metrics/bw-ft</property></product><max><value>2</value><product><value>2</value><property>velocities/vt-fps</property></product></max></quotient></product><product><value>0.08</value><property>fcs/aileron-cmd-norm</property></product></sum></product></function></axis>
<axis name="PITCH"><function name="aero/original-interactive-pitch"><product><product><property>aero/qbar-psf</property><property>metrics/Sw-sqft</property></product><property>metrics/cbarw-ft</property><sum><value>0.02</value><product><value>-1</value><property>aero/alpha-rad</property></product><product><value>-8</value><quotient><product><property>velocities/q-aero-rad_sec</property><property>metrics/cbarw-ft</property></product><max><value>2</value><product><value>2</value><property>velocities/vt-fps</property></product></max></quotient></product><product><value>-0.7</value><sum><property>fcs/elevator-cmd-norm</property><property>fcs/pitch-trim-cmd-norm</property></sum></product></sum></product></function></axis>
<axis name="YAW"><function name="aero/original-interactive-yaw"><product><product><property>aero/qbar-psf</property><property>metrics/Sw-sqft</property></product><property>metrics/bw-ft</property><sum><product><value>0.1</value><property>aero/beta-rad</property></product><product><value>-2</value><quotient><product><property>velocities/r-aero-rad_sec</property><property>metrics/bw-ft</property></product><max><value>2</value><product><value>2</value><property>velocities/vt-fps</property></product></max></quotient></product><product><value>-0.08</value><property>fcs/rudder-cmd-norm</property></product></sum></product></function></axis></aerodynamics>
</fdm_config>
