<?xml version="1.0"?>
<!-- Original MIT numerical fixture. No real-aircraft calibration or procedure claims. -->
<fdm_config name="Original synthetic numerical original-synthetic" version="2.0" release="ALPHA">
<fileheader><author>Flight Simulator Project</author><filecreationdate>2026-10-03</filecreationdate><description>Original synthetic test fixture; not a Cessna or a training model. Polynomial aerodynamics have no validated stall envelope.</description></fileheader>
<metrics><wingarea unit="M2">17</wingarea><wingspan unit="M">10</wingspan><chord unit="M">1.7</chord><location name="AERORP" unit="M"><x>0</x><y>0</y><z>0</z></location><location name="EYEPOINT" unit="M"><x>0</x><y>0</y><z>0</z></location><location name="VRP" unit="M"><x>0</x><y>0</y><z>0</z></location></metrics>
<mass_balance><ixx unit="SLUG*FT2">800</ixx><iyy unit="SLUG*FT2">1200</iyy><izz unit="SLUG*FT2">1600</izz><ixy unit="SLUG*FT2">0</ixy><ixz unit="SLUG*FT2">0</ixz><iyz unit="SLUG*FT2">0</iyz><emptywt unit="KG">1000</emptywt><location name="CG" unit="M"><x>0</x><y>0</y><z>0</z></location></mass_balance>
<ground_reactions/>
<propulsion><engine file="original-synthetic-thrust"><feed>0</feed><thruster file="original-synthetic-direct"><location unit="M"><x>0</x><y>0</y><z>0</z></location><orient unit="RAD"><roll>0</roll><pitch>0</pitch><yaw>0</yaw></orient></thruster></engine><tank type="FUEL" number="0"><location unit="M"><x>0</x><y>0</y><z>0</z></location><capacity unit="KG">100</capacity><contents unit="KG">100</contents></tank></propulsion>
<flight_control name="Pass-through normalized synthetic controls"/>
<aerodynamics><alphalimits unit="RAD"><min>-.2</min><max>.2</max></alphalimits><axis name="LIFT"><function name="aero/original-synthetic-lift"><product><product><property>aero/qbar-psf</property><property>metrics/Sw-sqft</property></product><sum><value>0.22</value><product><value>5</value><property>aero/alpha-rad</property></product></sum></product></function></axis>
<axis name="DRAG"><function name="aero/original-synthetic-drag"><product><product><property>aero/qbar-psf</property><property>metrics/Sw-sqft</property></product><sum><value>0.03</value><product><value>0.08</value><pow><property>aero/alpha-rad</property><value>2</value></pow></product></sum></product></function></axis>
<axis name="SIDE"><function name="aero/original-synthetic-side"><product><product><property>aero/qbar-psf</property><property>metrics/Sw-sqft</property></product><sum><product><value>-0.5</value><property>aero/beta-rad</property></product><product><value>0.15</value><property>fcs/rudder-cmd-norm</property></product></sum></product></function></axis>
<axis name="ROLL"><function name="aero/original-synthetic-roll"><product><product><property>aero/qbar-psf</property><property>metrics/Sw-sqft</property></product><property>metrics/bw-ft</property><sum><product><value>-0.05</value><property>aero/beta-rad</property></product><product><value>-0.6</value><quotient><product><property>velocities/p-aero-rad_sec</property><property>metrics/bw-ft</property></product><max><value>2</value><product><value>2</value><property>velocities/vt-fps</property></product></max></quotient></product><product><value>0.08</value><property>fcs/aileron-cmd-norm</property></product></sum></product></function></axis>
<axis name="PITCH"><function name="aero/original-synthetic-pitch"><product><product><property>aero/qbar-psf</property><property>metrics/Sw-sqft</property></product><property>metrics/cbarw-ft</property><sum><value>0.02</value><product><value>-1</value><property>aero/alpha-rad</property></product><product><value>-8</value><quotient><product><property>velocities/q-aero-rad_sec</property><property>metrics/cbarw-ft</property></product><max><value>2</value><product><value>2</value><property>velocities/vt-fps</property></product></max></quotient></product><product><value>-0.7</value><sum><property>fcs/elevator-cmd-norm</property><property>fcs/pitch-trim-cmd-norm</property></sum></product></sum></product></function></axis>
<axis name="YAW"><function name="aero/original-synthetic-yaw"><product><product><property>aero/qbar-psf</property><property>metrics/Sw-sqft</property></product><property>metrics/bw-ft</property><sum><product><value>0.1</value><property>aero/beta-rad</property></product><product><value>-2</value><quotient><product><property>velocities/r-aero-rad_sec</property><property>metrics/bw-ft</property></product><max><value>2</value><product><value>2</value><property>velocities/vt-fps</property></product></max></quotient></product><product><value>-0.08</value><property>fcs/rudder-cmd-norm</property></product></sum></product></function></axis></aerodynamics>
</fdm_config>
