<?xml version="1.0"?>
<!-- Original project MIT analytical mass fixture; no aircraft loading or flight model. -->
<fdm_config name="Original asymmetric CG algebra fixture" version="2.0" release="ALPHA">
  <fileheader><author>Flight Simulator Project</author><description>Independent original rational KG/IN mass inventory. Test-only.</description></fileheader>
  <metrics><wingarea unit="M2">17</wingarea><wingspan unit="M">10</wingspan><chord unit="M">1.7</chord>
    <location name="AERORP" unit="IN"><x>0</x><y>0</y><z>0</z></location>
    <location name="EYEPOINT" unit="IN"><x>0</x><y>0</y><z>0</z></location>
    <location name="VRP" unit="IN"><x>0</x><y>0</y><z>0</z></location></metrics>
  <mass_balance>
    <ixx unit="SLUG*FT2">800</ixx><iyy unit="SLUG*FT2">1200</iyy><izz unit="SLUG*FT2">1600</izz>
    <emptywt unit="KG">1000</emptywt><location name="CG" unit="IN"><x>12</x><y>0</y><z>6</z></location>
    <pointmass name="Original asymmetric load"><weight unit="KG">200</weight><location unit="IN"><x>48</x><y>18</y><z>-9</z></location></pointmass>
  </mass_balance>
  <ground_reactions/>
  <propulsion><tank type="FUEL" number="0"><location unit="IN"><x>24</x><y>-12</y><z>3</z></location>
    <capacity unit="KG">100</capacity><contents unit="KG">100</contents><radius unit="IN">0</radius></tank></propulsion>
  <flight_control name="No control system"/>
  <aerodynamics/>
</fdm_config>
