<?xml version="1.0"?>
<!-- Original MIT contact research fixture; no aircraft calibration. -->
<fdm_config name="Original ground cart" version="2.0" release="ALPHA">
<fileheader><author>Flight Simulator Project</author><description>Original tricycle numerical contact fixture with no aero or engine.</description></fileheader>
<metrics><wingarea unit="M2">17</wingarea><wingspan unit="M">10</wingspan><chord unit="M">1.7</chord><location name="AERORP" unit="M"><x>0</x><y>0</y><z>0</z></location></metrics>
<mass_balance><ixx unit="KG*M2">800</ixx><iyy unit="KG*M2">1000</iyy><izz unit="KG*M2">1500</izz><emptywt unit="KG">1100</emptywt><location name="CG" unit="M"><x>0</x><y>0</y><z>0</z></location></mass_balance>
<ground_reactions><contact type="BOGEY" name="nose"><location unit="M"><x>-2</x><y>0</y><z>-1</z></location><static_friction>.8</static_friction><dynamic_friction>.6</dynamic_friction><rolling_friction>.01</rolling_friction><spring_coeff unit="N/M">150000</spring_coeff><damping_coeff unit="N/M/SEC">10000</damping_coeff><damping_coeff_rebound unit="N/M/SEC">10000</damping_coeff_rebound><max_steer unit="DEG">30</max_steer><brake_group>NONE</brake_group><retractable>0</retractable></contact><contact type="BOGEY" name="left"><location unit="M"><x>1</x><y>-1.3</y><z>-1</z></location><static_friction>.8</static_friction><dynamic_friction>.6</dynamic_friction><rolling_friction>.01</rolling_friction><spring_coeff unit="N/M">150000</spring_coeff><damping_coeff unit="N/M/SEC">10000</damping_coeff><damping_coeff_rebound unit="N/M/SEC">10000</damping_coeff_rebound><max_steer unit="DEG">0</max_steer><brake_group>LEFT</brake_group><retractable>0</retractable></contact><contact type="BOGEY" name="right"><location unit="M"><x>1</x><y>1.3</y><z>-1</z></location><static_friction>.8</static_friction><dynamic_friction>.6</dynamic_friction><rolling_friction>.01</rolling_friction><spring_coeff unit="N/M">150000</spring_coeff><damping_coeff unit="N/M/SEC">10000</damping_coeff><damping_coeff_rebound unit="N/M/SEC">10000</damping_coeff_rebound><max_steer unit="DEG">0</max_steer><brake_group>RIGHT</brake_group><retractable>0</retractable></contact></ground_reactions>
<propulsion/><flight_control name="No aerodynamic actuation"/><aerodynamics/>
</fdm_config>
